r1 := 10^3
u1 := 99.4*10^-3
u2 := 100*10^-3
φ := 0
rv := r1*u1/(u2 - u1)
y1(t) := 1*sin(2*π*1000*t - 185.3)
rv = 165667
x := [0.0186; 0.092; 0.174; 0.552; 0.92; 1.22]
y := [0.0561; 0.283; 0.568; 1.68; 2.78; 3.66]
x11 := [0.0186; 0.092; 0.174; 0.552; 0.92; 1.22]
y11 := [0.0561; 0.283; 0.568; 1.68; 2.78; 3.66]
y2(t) := 1*sin(2*π*1000*t + φ)
ku := 300/99.4
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3.018*165.7/2 = 250.041
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3.018*250.041 = 754.624
